<?xml version="1.0"?>
<?xml-stylesheet type="text/xsl" href="http://jsbsim.sourceforge.net/JSBSim.xsl"?>

<fdm_config name="A-124 Ruslan" version="2.0" release="ALPHA"
   xmlns:xsi="http://www.w3.org/2001/XMLSchema-instance"
   xsi:noNamespaceSchemaLocation="http://jsbsim.sourceforge.net/JSBSim.xsd">

	<fileheader>
		<author>Peter Brendt (JWocky)</author>
		<filecreationdate> 2016-12-16 </filecreationdate>
		<version>2.0</version>
		<description> Models an Antonov An-124 </description>
	</fileheader>

	<!--
		File:     Ruslan-DT18T.xml
		Inputs:
			name:          Ruslan-T
			type:          four-engine transonic transport (tanker)
			manufacturer:  Antonov
			first flight:  December 1982
			max weight:    893,000 lb (405,000 kg)
			empty weight:  385,000 lb (175,000 kg)
			loaded weight: 893,000 lb (405,000 kg)
			wing span:     222.74709 ft (73.30 m)
			length:        240.48 ft (73.30 m)
			height:		68.17 ft (20.78 m)
			wing area:     6760 sq-ft
			gear type:     tricycle
			retractable?:  yes
			# engines:     4
			engine type:   fan-jet
			engine layout: wings
			yaw damper?    yes
		Outputs:
			wing loading:  74.70 lb/sq-ft
			CL-alpha:      4.4 per radian
			CL-0:          0.2
			CL-max:        1.2
			CD-0:          0.017
			K:             0.042
		General Characteristics:
			Crew: 4-8 typical (pilot, 1st Officer, one or two flight engineers, navigator, radio, one or two loadmasters), 3 minimum (pilot, copilot, flight-engineer)
			Payload: 330,000 lbs (150,000 kg)
			Engines : Ivchenko-Progress D-18T (sometimes referred as DT18-T) with 51,670 lbs thrust, modernized version with GP7000 with 81,500 lbs in discussion
			Fuel Capacity:		76,414 gallons
			Fuel Tanks:		10 integral tanks in wings
			Normal Cruise Speed: 	Mach 0.78
	-->

	<metrics>
		<wingarea  unit="M2"> 628.00 </wingarea>
		<wingspan  unit="M" >  73.3 </wingspan>
		<wing_incidence unit="DEG"> 2.00 </wing_incidence>
		<chord     unit="M" >  8.56 </chord>
		<htailarea unit="M2"> 157.015 </htailarea>
		<htailarm  unit="M" >  31.034 </htailarm>
		<vtailarea unit="M2"> 125.61 </vtailarea>
		<vtailarm  unit="M" >  31.034 </vtailarm>
		<location name="AERORP" unit="M">
			<x>   1.00 </x>
			<y>   0.00 </y>
			<z>   0.00 </z>
		</location>
		<location name="EYEPOINT" unit="M">
			<x>  4.84124 </x>
			<y>  0.00000 </y>
			<z>  2.03200 </z>
		</location>
		<location name="VRP" unit="M">
			<x>0</x>
			<y>0</y>
			<z>4.50</z>
		</location>
	</metrics>

	<mass_balance>
		<ixx unit="KG*M2"> 24057612.0117128 </ixx>
		<iyy unit="KG*M2"> 24037924.1792609 </iyy>
		<izz unit="KG*M2"> 48870406.4866679 </izz>
		<emptywt unit="KG" > 175029.9558 </emptywt>
		<location name="CG" unit="M">
			<x>  1.00 </x>
			<y>  0.00 </y>
			<z>  0.00 </z>
		</location>

		<pointmass name="Pilot">
			<weight unit="LBS"> 180.00 </weight>
			<location name="POINTMASS" unit="M">
				<x>30.9843 </x>		<!-- just estimations from sketches -->
				<y>-1.8000 </y>
				<z>-2.5000 </z>
			</location>
		</pointmass>

		<pointmass name="First Officer">
			<weight unit="LBS"> 180.00 </weight>
			<location name="POINTMASS" unit="M">
				<x>30.9843 </x>
				<y> 1.8000 </y>
				<z>-2.5000 </z>
			</location>
		</pointmass>

		<pointmass name="Navigator">
			<weight unit="LBS"> 180.00 </weight>
			<location name="POINTMASS" unit="M">
				<x>28.98 </x>
				<y>-1.6000 </y>
				<z>-2.5000 </z>
			</location>
		</pointmass>

		<pointmass name="Radio">
			<weight unit="LBS"> 180.00 </weight>
			<location name="POINTMASS" unit="M">
				<x>26.9843 </x>	<!-- both on the right side, so middle between their seats -->
				<y>-1.6000 </y>
				<z>-2.5000 </z>
			</location>
		</pointmass>

		<pointmass name="Engineers">
			<weight unit="LBS"> 180.00 </weight>
			<location name="POINTMASS" unit="M">
				<x>28.2343 </x>	<!-- both on the right side, so middle between their seats -->
				<y> 1.6000 </y>
				<z>-2.5000 </z>
			</location>
		</pointmass>

		<pointmass name="Loadmasters">
			<weight unit="LBS"> 180.00 </weight>
			<location name="POINTMASS" unit="M">
				<x>22.4843 </x>	<!-- actually, one sits left, one sits right, one on rest, so they equal each other out -->
				<y>    0.00 </y>
				<z>  154.75 </z>
			</location>
		</pointmass>

	</mass_balance>

	<ground_reactions>

		<contact type="BOGEY" name="NOSEGEAR1">
			<location unit="M">
				<x> -32.4800 </x>
				<y> -0.40 </y>
				<z>  0.00 </z>
			</location>
			<static_friction>  0.80 </static_friction>
			<dynamic_friction> 0.50 </dynamic_friction>
			<rolling_friction> 0.02 </rolling_friction>
			<spring_coeff unit="LBS/FT">      870000.00 </spring_coeff>
			<damping_coeff unit="LBS/FT/SEC"> 214000.00 </damping_coeff>
			<damping_coeff_rebound unit="LBS/FT/SEC"> 214000.00 </damping_coeff_rebound>
			<break_group>NONE</break_group>
			<max_steer unit="DEG">45</max_steer>
			<retractable>1</retractable>
		</contact>

		<contact type="BOGEY" name="NOSEGEAR2">
			<location unit="M">
				<x> -32.4800 </x>
				<y>  0.40 </y>
				<z>  0.00 </z>
			</location>
			<static_friction>  0.80 </static_friction>
			<dynamic_friction> 0.50 </dynamic_friction>
			<rolling_friction> 0.02 </rolling_friction>
			<spring_coeff unit="LBS/FT">      870000.00 </spring_coeff>
			<damping_coeff unit="LBS/FT/SEC"> 214000.00 </damping_coeff>
			<damping_coeff_rebound unit="LBS/FT/SEC"> 214000.00 </damping_coeff_rebound>
			<break_group>NONE</break_group>
			<!-- max_steer unit="DEG">
				<property>/controls/gear/nosegear-angle</property>
			</max_steer -->
			<max_steer unit="DEG">45</max_steer>
			<retractable>1</retractable>
		</contact>

		<contact type="BOGEY" name="Main_Left1">
			<location unit="M">
				<x>  1.98 </x>
				<y> -4.0000 </y>
				<z>  0.0000 </z>
			</location>
			<static_friction>  0.80 </static_friction>
			<dynamic_friction> 0.50 </dynamic_friction>
			<rolling_friction> 0.02 </rolling_friction>
			<spring_coeff unit="LBS/FT">      870000.00 </spring_coeff>
			<damping_coeff unit="LBS/FT/SEC"> 314000.00 </damping_coeff>
			<damping_coeff_rebound unit="LBS/FT/SEC"> 214000.00 </damping_coeff_rebound>
			<!-- max_steer unit="DEG">
				<property>controls/gear/maingear-angle</property>
			</max_steer -->
			<max_steer unit="DEG">-22.5</max_steer>
			<brake_group>LEFT</brake_group>
			<retractable>1</retractable>
		</contact>

		<contact type="BOGEY" name="Main_Left2">
			<location unit="M">
				<x>  2.98 </x>
				<y> -4.0000 </y>
				<z>  0.0000 </z>
			</location>
			<static_friction>  0.80 </static_friction>
			<dynamic_friction> 0.50 </dynamic_friction>
			<rolling_friction> 0.02 </rolling_friction>
			<spring_coeff unit="LBS/FT">      870000.00 </spring_coeff>
			<damping_coeff unit="LBS/FT/SEC"> 314000.00 </damping_coeff>
			<damping_coeff_rebound unit="LBS/FT/SEC"> 214000.00 </damping_coeff_rebound>
			<!-- max_steer unit="DEG">
				<property>controls/gear/maingear-angle</property>
			</max_steer -->
			<max_steer unit="DEG">-22.5</max_steer>
			<brake_group>LEFT</brake_group>
			<retractable>1</retractable>
		</contact>

		<contact type="BOGEY" name="Main_Left3">
			<location unit="M">
				<x>  3.98 </x>
				<y> -4.0000 </y>
				<z>  0.0000 </z>
			</location>
			<static_friction>  0.80 </static_friction>
			<dynamic_friction> 0.50 </dynamic_friction>
			<rolling_friction> 0.02 </rolling_friction>
			<spring_coeff unit="LBS/FT">      870000.00 </spring_coeff>
			<damping_coeff unit="LBS/FT/SEC"> 314000.00 </damping_coeff>
			<damping_coeff_rebound unit="LBS/FT/SEC"> 214000.00 </damping_coeff_rebound>
			<!-- max_steer unit="DEG">
				<property>controls/gear/maingear-angle</property>
			</max_steer -->
			<max_steer unit="DEG">-22.5</max_steer>
			<brake_group>LEFT</brake_group>
			<retractable>1</retractable>
		</contact>

		<contact type="BOGEY" name="Main_Left4">
			<location unit="M">
				<x>  4.98 </x>
				<y> -4.0000 </y>
				<z>  0.0000 </z>
			</location>
			<static_friction>  0.80 </static_friction>
			<dynamic_friction> 0.50 </dynamic_friction>
			<rolling_friction> 0.02 </rolling_friction>
			<spring_coeff unit="LBS/FT">      570000.00 </spring_coeff>
			<damping_coeff unit="LBS/FT/SEC"> 214000.00 </damping_coeff>
			<damping_coeff_rebound unit="LBS/FT/SEC"> 214000.00 </damping_coeff_rebound>
			<!-- max_steer unit="DEG">
				<property>controls/gear/maingear-angle</property>
			</max_steer-->
			<max_steer unit="DEG">-22.5</max_steer>
			<brake_group>LEFT</brake_group>
			<retractable>1</retractable>
		</contact>

		<contact type="BOGEY" name="Main_Left5">
			<location unit="M">
				<x>  5.98 </x>
				<y> -4.0000 </y>
				<z>  0.0000 </z>
			</location>
			<static_friction>  0.80 </static_friction>
			<dynamic_friction> 0.50 </dynamic_friction>
			<rolling_friction> 0.02 </rolling_friction>
			<spring_coeff unit="LBS/FT">      570000.00 </spring_coeff>
			<damping_coeff unit="LBS/FT/SEC"> 214000.00 </damping_coeff>
			<damping_coeff_rebound unit="LBS/FT/SEC"> 214000.00 </damping_coeff_rebound>
			<!-- max_steer unit="DEG">
				<property>controls/gear/maingear-angle</property>
			</max_steer -->
			<max_steer unit="DEG">-22.5</max_steer>
			<brake_group>LEFT</brake_group>
			<retractable>1</retractable>
		</contact>

		<contact type="BOGEY" name="Main_Right1">
			<location unit="M">
				<x>  1.98 </x>
				<y>  4.0000 </y>
				<z>  0.0000 </z>
			</location>
			<static_friction>  0.80 </static_friction>
			<dynamic_friction> 0.50 </dynamic_friction>
			<rolling_friction> 0.02 </rolling_friction>
			<spring_coeff unit="LBS/FT">      870000.00 </spring_coeff>
			<damping_coeff unit="LBS/FT/SEC"> 314000.00 </damping_coeff>
			<damping_coeff_rebound unit="LBS/FT/SEC"> 214000.00 </damping_coeff_rebound>
			<!-- max_steer unit="DEG">
				<property>controls/gear/maingear-angle</property>
			</max_steer -->
			<max_steer unit="DEG">-22.5</max_steer>
			<brake_group>RIGHT</brake_group>
			<retractable>1</retractable>
		</contact>

		<contact type="BOGEY" name="Main_Right2">
			<location unit="M">
				<x>  2.98 </x>
				<y>  4.0000 </y>
				<z>  0.0000 </z>
			</location>
			<static_friction>  0.80 </static_friction>
			<dynamic_friction> 0.50 </dynamic_friction>
			<rolling_friction> 0.02 </rolling_friction>
			<spring_coeff unit="LBS/FT">      870000.00 </spring_coeff>
			<damping_coeff unit="LBS/FT/SEC"> 314000.00 </damping_coeff>
			<damping_coeff_rebound unit="LBS/FT/SEC"> 214000.00 </damping_coeff_rebound>
			<!-- max_steer unit="DEG">
				<property>controls/gear/maingear-angle</property>
			</max_steer -->
			<max_steer unit="DEG">-22.5</max_steer>
			<brake_group>RIGHT</brake_group>
			<retractable>1</retractable>
		</contact>

		<contact type="BOGEY" name="Main_Right3">
			<location unit="M">
				<x>  3.98 </x>
				<y>  4.0000 </y>
				<z>  0.0000 </z>
			</location>
			<static_friction>  0.80 </static_friction>
			<dynamic_friction> 0.50 </dynamic_friction>
			<rolling_friction> 0.02 </rolling_friction>
			<spring_coeff unit="LBS/FT">      870000.00 </spring_coeff>
			<damping_coeff unit="LBS/FT/SEC"> 314000.00 </damping_coeff>
			<damping_coeff_rebound unit="LBS/FT/SEC"> 214000.00 </damping_coeff_rebound>
			<!-- max_steer unit="DEG">
				<property>controls/gear/maingear-angle</property>
			</max_steer -->
			<max_steer unit="DEG">-22.5</max_steer>
			<brake_group>RIGHT</brake_group>
			<retractable>1</retractable>
		</contact>

		<contact type="BOGEY" name="Main_Right4">
			<location unit="M">
				<x>  4.98</x>
				<y>  4.0000 </y>
				<z>  0.0000 </z>
			</location>
			<static_friction>  0.80 </static_friction>
			<dynamic_friction> 0.50 </dynamic_friction>
			<rolling_friction> 0.02 </rolling_friction>
			<spring_coeff unit="LBS/FT">      870000.00 </spring_coeff>
			<damping_coeff unit="LBS/FT/SEC"> 314000.00 </damping_coeff>
			<damping_coeff_rebound unit="LBS/FT/SEC"> 214000.00 </damping_coeff_rebound>
			<!-- max_steer unit="DEG">
				<property>/controls/gear/maingear-angle</property>
			</max_steer -->
			<max_steer unit="DEG">-22.5</max_steer>
			<brake_group>RIGHT</brake_group>
			<retractable>1</retractable>
		</contact>

		<contact type="BOGEY" name="Main_Right5">
			<location unit="M">
				<x>  5.98</x>
				<y>  4.0000 </y>
				<z>  0.000 </z>
			</location>
			<static_friction>  0.80 </static_friction>
			<dynamic_friction> 0.50 </dynamic_friction>
			<rolling_friction> 0.02 </rolling_friction>
			<spring_coeff unit="LBS/FT">      870000.00 </spring_coeff>
			<damping_coeff unit="LBS/FT/SEC"> 314000.00 </damping_coeff>
			<damping_coeff_rebound unit="LBS/FT/SEC"> 214000.00 </damping_coeff_rebound>
			<!-- max_steer unit="DEG">
				<property>/controls/gear/maingear-angle</property>
			</max_steer -->
			<max_steer unit="DEG">-22.5</max_steer>
			<brake_group>RIGHT</brake_group>
			<retractable>1</retractable>
		</contact>

		<!-- contact type="STRUCTURE" name="LEFT_WING">
			<location unit="IN">
				<x> 1584.63 </x>
				<y> -1445.36 </y>
				<z> 60.24 </z>
			</location>
			<static_friction>  0.80 </static_friction>
			<dynamic_friction> 0.50 </dynamic_friction>
			<spring_coeff unit="LBS/FT">      500000.0 </spring_coeff>
			<damping_coeff unit="LBS/FT/SEC"> 500000.0 </damping_coeff>
		</contact>

		<contact type="STRUCTURE" name="RIGHT_WING">
			<location unit="IN">
				<x> 1584.63 </x>
				<y> -1445.36 </y>
				<z> 60.24 </z>
			</location>
			<static_friction>  0.80 </static_friction>
			<dynamic_friction> 0.50 </dynamic_friction>
			<spring_coeff unit="LBS/FT">      500000.0 </spring_coeff>
			<damping_coeff unit="LBS/FT/SEC"> 500000.0 </damping_coeff>
		</contact>

		<contact type="STRUCTURE" name="NG_POD">
			<location unit="IN">
				<x> 510.67 </x>
				<y> 0 </y>
				<z> 151.65 </z>
			</location>
			<static_friction>  0.80 </static_friction>
			<dynamic_friction> 0.50 </dynamic_friction>
			<spring_coeff unit="LBS/FT">      500000.0 </spring_coeff>
			<damping_coeff unit="LBS/FT/SEC"> 500000.0 </damping_coeff>
		</contact>

		<contact type="STRUCTURE" name="Nosetip">
			<location unit="IN">
				<x> 0 </x>
				<y> 0 </y>
				<z> 60 </z>
			</location>
			<static_friction>  0.80 </static_friction>
			<dynamic_friction> 0.50 </dynamic_friction>
			<spring_coeff unit="LBS/FT">      500000.0 </spring_coeff>
			<damping_coeff unit="LBS/FT/SEC"> 500000.0 </damping_coeff>
		</contact>

		<contact type="STRUCTURE" name="MLG_PODLT">
			<location unit="IN">
				<x> 1391.97 </x>
				<y> -147.01 </y>
				<z> 148.56 </z>
			</location>
			<static_friction>  0.80 </static_friction>
			<dynamic_friction> 0.50 </dynamic_friction>
			<spring_coeff unit="LBS/FT">      500000.0 </spring_coeff>
			<damping_coeff unit="LBS/FT/SEC"> 500000.0 </damping_coeff>
		</contact>

		<contact type="STRUCTURE" name="MLG_PODRT">
			<location unit="IN">
				<x> 1391.97 </x>
				<y> 147.01 </y>
				<z> 148.56 </z>
			</location>
			<static_friction>  0.80 </static_friction>
			<dynamic_friction> 0.50 </dynamic_friction>
			<spring_coeff unit="LBS/FT">      500000.0 </spring_coeff>
			<damping_coeff unit="LBS/FT/SEC"> 500000.0 </damping_coeff>
		</contact>

		<contact type="STRUCTURE" name="Rear_Fuselage">
			<location unit="IN">
				<x> 2429.57 </x>
				<y> 0 </y>
				<z> 32.38 </z>
			</location>
			<static_friction>  0.80 </static_friction>
			<dynamic_friction> 0.50 </dynamic_friction>
			<spring_coeff unit="LBS/FT">      500000.0 </spring_coeff>
			<damping_coeff unit="LBS/FT/SEC"> 500000.0 </damping_coeff>
		</contact -->

	</ground_reactions>

<system file="NWS"/>

	<propulsion>

		<engine file="Ivchenko_DT18T"> <!-- Engine1 -->
			<location unit="M">
				<x>   6.3951 </x>
				<y> -17.6897 </y>
				<z>  -1.0000 </z>
			</location>
			<orient unit="DEG">
				<pitch> 0.00 </pitch>
				<roll>  0.00 </roll>
				<yaw>   0.00 </yaw>
			</orient>
			<feed>0</feed>
			<thruster file="direct">
				<location unit="M">
					<x>   4.3951 </x>
					<y> -17.6897 </y>
					<z>  -1.0000 </z>
				</location>
				<orient unit="DEG">
					<pitch> 0.00 </pitch>
					<roll>   0.00 </roll>
					<yaw>   0.00 </yaw>
				</orient>
			</thruster>
		</engine>

		<engine file="Ivchenko_DT18T"> <!-- Engine2 -->
			<location unit="M">
				<x>  4.4940 </x>
				<y> -10.4939 </y>
				<z>  -1.0000</z>
			</location>
			<orient unit="DEG">
				<pitch> 0.00 </pitch>
				<roll>   0.00 </roll>
				<yaw>   0.00 </yaw>
			</orient>
			<feed>1</feed>
			<thruster file="direct">
				<location unit="M">
					<x>  0.4940 </x>
					<y> -10.4939 </y>
					<z>  -1.0000</z>
				</location>
				<orient unit="DEG">
					<pitch> 0.00 </pitch>
					<roll>   0.00 </roll>
					<yaw>   0.00 </yaw>
				</orient>
			</thruster>
		</engine>

		<engine file="Ivchenko_DT18T"> <!-- Engine3 -->
			<location unit="M">
				<x>  4.4940 </x>
				<y>  10.4939 </y>
				<z>  -1.0000</z>
			</location>
			<orient unit="DEG">
				<pitch> 0.00 </pitch>
				<roll>   0.00 </roll>
				<yaw>   0.00 </yaw>
			</orient>
			<feed>2</feed>
			<thruster file="direct">
				<location unit="M">
					<x>  0.4940 </x>
					<y>  10.4939 </y>
					<z>  -1.0000</z>
				</location>
				<orient unit="DEG">
					<pitch> 0.00 </pitch>
					<roll>   0.00 </roll>
					<yaw>   0.00 </yaw>
				</orient>
			</thruster>
		</engine>

		<engine file="Ivchenko_DT18T"> <!-- Engine4 -->
			<location unit="M">
				<x>   8.3951 </x>
				<y>  17.6897 </y>
				<z>  -1.0000 </z>
			</location>
			<orient unit="DEG">
				<pitch> 0.00 </pitch>
				<roll>  0.00 </roll>
				<yaw>   0.00 </yaw>
			</orient>
			<feed>3</feed>
			<thruster file="direct">
				<location unit="M">
					<x>  4.3951 </x>
					<y>  17.6897 </y>
					<z>  -1.0000 </z>
				</location>
				<orient unit="DEG">
					<pitch> 0.00 </pitch>
					<roll>   0.00 </roll>
					<yaw>   0.00 </yaw>
				</orient>
			</thruster>
		</engine>

		<engine file="Alliance_GP7277"> <!-- Engine1 -->
			<location unit="M">
				<x>   6.3951 </x>
				<y> -17.6897 </y>
				<z>  -1.0000 </z>
			</location>
			<orient unit="DEG">
				<pitch> 0.00 </pitch>
				<roll>  0.00 </roll>
				<yaw>   0.00 </yaw>
			</orient>
			<feed>0</feed>
			<thruster file="direct">
				<location unit="M">
					<x>   4.3951 </x>
					<y> -17.6897 </y>
					<z>  -1.0000 </z>
				</location>
				<orient unit="DEG">
					<pitch> 0.00 </pitch>
					<roll>   0.00 </roll>
					<yaw>   0.00 </yaw>
				</orient>
			</thruster>
		</engine>

		<engine file="Alliance_GP7277"> <!-- Engine2 -->
			<location unit="M">
				<x>  4.4940 </x>
				<y> -10.4939 </y>
				<z>  -1.0000</z>
			</location>
			<orient unit="DEG">
				<pitch> 0.00 </pitch>
				<roll>   0.00 </roll>
				<yaw>   0.00 </yaw>
			</orient>
			<feed>1</feed>
			<thruster file="direct">
				<location unit="M">
					<x>  2.4940 </x>
					<y> -10.4939 </y>
					<z>  -1.0000</z>
				</location>
				<orient unit="DEG">
					<pitch> 0.00 </pitch>
					<roll>   0.00 </roll>
					<yaw>   0.00 </yaw>
				</orient>
			</thruster>
		</engine>

		<engine file="Alliance_GP7277"> <!-- Engine3 -->
			<location unit="M">
				<x>  4.4940 </x>
				<y>  10.4939 </y>
				<z>  -1.0000</z>
			</location>
			<orient unit="DEG">
				<pitch> 0.00 </pitch>
				<roll>   0.00 </roll>
				<yaw>   0.00 </yaw>
			</orient>
			<feed>2</feed>
			<thruster file="direct">
				<location unit="M">
					<x>  2.4940 </x>
					<y>  10.4939 </y>
					<z>  -1.0000</z>
				</location>
				<orient unit="DEG">
					<pitch> 0.00 </pitch>
					<roll>   0.00 </roll>
					<yaw>   0.00 </yaw>
				</orient>
			</thruster>
		</engine>

		<engine file="Alliance_GP7277"> <!-- Engine4 -->
			<location unit="M">
				<x>   6.3951 </x>
				<y>  17.6897 </y>
				<z>  -1.0000 </z>
			</location>
			<orient unit="DEG">
				<pitch> 0.00 </pitch>
				<roll>  0.00 </roll>
				<yaw>   0.00 </yaw>
			</orient>
			<feed>3</feed>
			<thruster file="direct">
				<location unit="M">
					<x>  4.3951 </x>
					<y>  17.6897 </y>
					<z>  -1.0000 </z>
				</location>
				<orient unit="DEG">
					<pitch> 0.00 </pitch>
					<roll>   0.00 </roll>
					<yaw>   0.00 </yaw>
				</orient>
			</thruster>
		</engine>

		<tank type="FUEL" number="0"> <!-- Feeder 1 -->
			<location unit="M">
				<x>   6.3951 </x>
				<y> -17.6897 </y>
				<z>  -1.0000 </z>
			</location>
			<priority>1</priority>
			<capacity unit="LBS"> 250 </capacity>
			<contents unit="LBS"> 250 </contents>
			<type> JP-8 </type>
		</tank>

		<tank type="FUEL" number="1"> <!-- Feeder 2 -->
			<location unit="M">
				<x>  4.4940 </x>
				<y> -10.4939 </y>
				<z>  -1.0000</z>
			</location>
			<priority>1</priority>
			<capacity unit="LBS"> 250 </capacity>
			<contents unit="LBS"> 250 </contents>
			<type> JP-8 </type>
		</tank>

		<tank type="FUEL" number="2"> <!-- Feeder 3 -->
			<location unit="M">
				<x>  4.4940 </x>
				<y>  10.4939 </y>
				<z>  -1.0000</z>
			</location>
			<priority>1</priority>
			<capacity unit="LBS"> 250 </capacity>
			<contents unit="LBS"> 250 </contents>
			<type> JP-8 </type>
		</tank>

		<tank type="FUEL" number="3"> <!-- Feeder 4 -->
			<location unit="M">
				<x>   6.3951 </x>
				<y>  17.6897 </y>
				<z>  -1.0000 </z>
			</location>
			<priority>1</priority>
			<capacity unit="LBS"> 250 </capacity>
			<contents unit="LBS"> 250 </contents>
			<type> JP-8 </type>
		</tank>

		<tank type="FUEL" number="4"> <!-- Left5 -->
			<location unit="M">
				<x>   3.00 </x>
				<y> -27.09 </y>
				<z>   2.13 </z>
			</location>
			<priority>3</priority>
			<capacity unit="LBS"> 22088 </capacity>
			<contents unit="LBS"> 22088 </contents>
			<type> JP-8 </type>
		</tank>

		<tank type="FUEL" number="5"> <!-- Left4 -->
			<location unit="M">
				<x>   2.00 </x>
				<y> -20.14 </y>
				<z>   2.78 </z>
			</location>
			<priority>3</priority>
			<capacity unit="LBS"> 32088 </capacity>
			<contents unit="LBS"> 32088 </contents>
			<type> JP-8 </type>
		</tank>

		<tank type="FUEL" number="6"> <!-- Left3 -->
			<location unit="M">
				<x>   1.00 </x>
				<y> -15.53 </y>
				<z>   3.35 </z>
			</location>
			<priority>3</priority>
			<capacity unit="LBS"> 52088 </capacity>
			<contents unit="LBS"> 52088 </contents>
			<type> JP-8 </type>
		</tank>

		<tank type="FUEL" number="7"> <!-- Left2 -->
			<location unit="M">
				<x>   0.00 </x>
				<y> -11.40 </y>
				<z>   3.63 </z>
			</location>
			<priority>3</priority>
			<capacity unit="LBS"> 72088 </capacity>
			<contents unit="LBS"> 72088 </contents>
			<type> JP-8 </type>
		</tank>

		<tank type="FUEL" number="8"> <!-- Left1 -->
			<location unit="M">
				<x>  -1.00 </x>
				<y>  -7.11 </y>
				<z>   4.00 </z>
			</location>
			<priority>3</priority>
			<capacity unit="LBS"> 72088 </capacity>
			<contents unit="LBS"> 72088 </contents>
			<type> JP-8 </type>
		</tank>

		<tank type="FUEL" number="9"> <!-- Right1 -->
			<location unit="M">
				<x>  -1.00 </x>
				<y>   7.11 </y>
				<z>   4.00 </z>
			</location>
			<priority>3</priority>
			<capacity unit="LBS"> 72088 </capacity>
			<contents unit="LBS"> 72088 </contents>
			<type> JP-8 </type>
		</tank>

		<tank type="FUEL" number="10"> <!-- Right2 -->
			<location unit="M">
				<x>   0.00 </x>
				<y>  11.40 </y>
				<z>   3.63 </z>
			</location>
			<priority>3</priority>
			<capacity unit="LBS"> 72088 </capacity>
			<contents unit="LBS"> 72088 </contents>
			<type> JP-8 </type>
		</tank>

		<tank type="FUEL" number="11"> <!-- Right3 -->
			<location unit="M">
				<x>   1.00 </x>
				<y>  15.53 </y>
				<z>   3.35 </z>
			</location>
			<priority>3</priority>
			<capacity unit="LBS"> 52088 </capacity>
			<contents unit="LBS"> 52088 </contents>
			<type> JP-8 </type>
		</tank>

		<tank type="FUEL" number="12"> <!-- Right4 -->
			<location unit="M">
				<x>   2.00 </x>
				<y>  20.14 </y>
				<z>   2.78 </z>
			</location>
			<priority>3</priority>
			<capacity unit="LBS"> 32088 </capacity>
			<contents unit="LBS"> 32088 </contents>
			<type> JP-8 </type>
		</tank>

		<tank type="FUEL" number="13"> <!-- Right5 -->
			<location unit="M">
				<x>   3.00 </x>
				<y>  27.09 </y>
				<z>   2.13 </z>
			</location>
			<priority>3</priority>
			<capacity unit="LBS"> 22088 </capacity>
			<contents unit="LBS"> 22088 </contents>
			<type> JP-8 </type>
		</tank>

		<tank type="FUEL" number="14"> <!-- Center 1, for refueling -->
			<location unit="M">
				<x>  -1.00 </x>
				<y>  -2.00 </y>
				<z>   0.00 </z>
			</location>
			<priority>4</priority>
			<capacity unit="LBS"> 58048 </capacity>
			<contents unit="LBS"> 0 </contents>
			<type> JP-8 </type>
		</tank>

		<tank type="FUEL" number="15"> <!-- Center 2, for refueling -->
			<location unit="M">
				<x>  -1.00 </x>
				<y>   2.00 </y>
				<z>   0.00 </z>
			</location>
			<priority>4</priority>
			<capacity unit="LBS"> 58048 </capacity>
			<contents unit="LBS"> 0 </contents>
			<type> JP-8 </type>
		</tank>

		<tank type="FUEL" number="16"> <!-- Center 3, for refueling -->
			<location unit="M">
				<x>  -0.50 </x>
				<y>  -2.00 </y>
				<z>   0.00 </z>
			</location>
			<priority>4</priority>
			<capacity unit="LBS"> 58048 </capacity>
			<contents unit="LBS"> 0 </contents>
			<type> JP-8 </type>
		</tank>

		<tank type="FUEL" number="17"> <!-- Center 4, for refueling -->
			<location unit="M">
				<x>  -0.50 </x>
				<y>   2.00 </y>
				<z>   0.00 </z>
			</location>
			<priority>4</priority>
			<capacity unit="LBS"> 58048 </capacity>
			<contents unit="LBS"> 0 </contents>
			<type> JP-8 </type>
		</tank>

		<tank type="FUEL" number="18"> <!-- Center 5, for refueling -->
			<location unit="M">
				<x>   0.00 </x>
				<y>  -2.00 </y>
				<z>   0.00 </z>
			</location>
			<priority>4</priority>
			<capacity unit="LBS"> 58048 </capacity>
			<contents unit="LBS"> 0 </contents>
			<type> JP-8 </type>
		</tank>

		<tank type="FUEL" number="19"> <!-- Center 6, for refueling -->
			<location unit="M">
				<x>   0.00 </x>
				<y>   2.00 </y>
				<z>   0.00 </z>
			</location>
			<priority>4</priority>
			<capacity unit="LBS"> 58048 </capacity>
			<contents unit="LBS"> 0 </contents>
			<type> JP-8 </type>
		</tank>

	</propulsion>

	<system file="Fuelsystem"/>
	<system file="TriCycle_PushbackJSBSIM"/>

	<flight_control name="FCS: Ruslan">

		<channel name="Pitch">

			<summer name="Pitch Trim Sum">
				<input>fcs/elevator-cmd-norm</input>
				<input>fcs/pitch-trim-cmd-norm</input>
				<clipto>
					<min> -1 </min>
					<max>  1 </max>
				</clipto>
			</summer>

			<aerosurface_scale name="Elevator Control">
				<input>fcs/pitch-trim-sum</input>
				<range>
					<min> -0.35 </min>
					<max>  0.35 </max>
				</range>
				<output>fcs/elevator-pos-rad</output>
			</aerosurface_scale>

			<aerosurface_scale name="elevator normalization">
				<input>fcs/elevator-pos-rad</input>
				<domain>
					<min> -0.35 </min>
					<max>  0.35 </max>
				</domain>
				<range>
					<min> -1 </min>
					<max>  1 </max>
				</range>
				<output>fcs/elevator-pos-norm</output>
			</aerosurface_scale>

		</channel>

		<channel name="Roll">

			<summer name="Roll Trim Sum">
				<input>fcs/aileron-cmd-norm</input>
				<input>fcs/roll-trim-cmd-norm</input>
				<clipto>
					<min> -1 </min>
					<max>  1 </max>
				</clipto>
			</summer>

			<aerosurface_scale name="Left Aileron Control">
				<input>fcs/roll-trim-sum</input>
				<range>
					<min> -0.35 </min>
					<max>  0.35 </max>
				</range>
				<output>fcs/left-aileron-pos-rad</output>
			</aerosurface_scale>

			<aerosurface_scale name="Right Aileron Control">
				<input>fcs/roll-trim-sum</input>
				<range>
					<min> -0.35 </min>
					<max>  0.35 </max>
				</range>
				<output>fcs/right-aileron-pos-rad</output>
			</aerosurface_scale>

			<aerosurface_scale name="left aileron normalization">
				<input>fcs/left-aileron-pos-rad</input>
				<domain>
					<min> -0.35 </min>
					<max>  0.35 </max>
				</domain>
				<range>
					<min> -1 </min>
					<max>  1 </max>
				</range>
				<output>fcs/left-aileron-pos-norm</output>
			</aerosurface_scale>

			<aerosurface_scale name="right aileron normalization">
				<input>fcs/right-aileron-pos-rad</input>
				<domain>
					<min> -0.35 </min>
					<max>  0.35 </max>
				</domain>
				<range>
					<min> -1 </min>
					<max>  1 </max>
				</range>
				<output>fcs/right-aileron-pos-norm</output>
			</aerosurface_scale>

		</channel>

		<property value="1">fcs/yaw-damper-enable</property>

		<channel name="Yaw">

			<summer name="Rudder Command Sum">
				<input>fcs/rudder-cmd-norm</input>
				<input>fcs/yaw-trim-cmd-norm</input>
				<clipto>
					<min> -1 </min>
					<max>  1 </max>
				</clipto>
			</summer>

			<scheduled_gain name="Yaw Damper Rate">
				<input>velocities/r-aero-rad_sec</input>
				<table>
					<independentVar lookup="row">velocities/ve-kts</independentVar>
					<tableData>
						30     0.00
						60     2.00
					</tableData>
				</table>
				<gain>fcs/yaw-damper-enable</gain>
			</scheduled_gain>

			<summer name="Rudder Sum">
				<input>fcs/rudder-command-sum</input>
				<input>fcs/yaw-damper-rate</input>
				<clipto>
					<min> -1.1 </min>
					<max>  1.1 </max>
				</clipto>
			</summer>

			<aerosurface_scale name="Rudder Control">
				<input>fcs/rudder-sum</input>
				<domain>
					<min> -1.1 </min>
					<max>  1.1 </max>
				</domain>
				<range>
					<min> -0.35 </min>
					<max>  0.35 </max>
				</range>
				<output>fcs/rudder-pos-rad</output>
			</aerosurface_scale>

			<aerosurface_scale name="rudder normalization">
				<input>fcs/rudder-pos-rad</input>
				<domain>
					<min> -0.35 </min>
					<max>  0.35 </max>
				</domain>
				<range>
					<min> -1 </min>
					<max>  1 </max>
				</range>
				<output>fcs/rudder-pos-norm</output>
			</aerosurface_scale>

		</channel>

		<channel name="Flaps">
			<kinematic name="Flaps Control">
				<input>fcs/flap-cmd-norm</input>
				<traverse>

		<!-- flaps>
			<setting>0.000</setting> <! - - 0 deg up - - >
			<setting>0.200</setting> <! - - 8 deg maneuvering - - >
			<setting>0.400</setting> <! - - 16 deg intermediate I - - >
			<setting>0.625</setting> <! - - 25 deg intermediate II - - >
			<setting>0.800</setting> <! - - 32 deg take off - - >
			<setting>1.000</setting> <! - - 40 deg landing - - >
		</flaps -->
					<setting>
						<position>  0 </position>
						<time>      0 </time>
					</setting>
					<setting>
						<position>  8 </position>
						<time>      5 </time>
					</setting>
					<setting>
						<position> 16 </position>
						<time>     16 </time>
					</setting>
					<setting>
						<position> 25 </position>
						<time>     16 </time>
					</setting>
					<setting>
						<position> 32 </position>
						<time>     16 </time>
					</setting>
					<setting>
						<position> 40 </position>
						<time>     16 </time>
					</setting>
				</traverse>
				<output>fcs/flap-pos-deg</output>
			</kinematic>

			<aerosurface_scale name="flap normalization">
				<input>fcs/flap-pos-deg</input>
				<domain>
					<min>  0 </min>
					<max> 40 </max>
				</domain>
				<range>
					<min> 0 </min>
					<max> 1 </max>
				</range>
				<output>fcs/flap-pos-norm</output>
			</aerosurface_scale>

		</channel>

		<channel name="Landing Gear">
			<kinematic name="Gear Control">
				<input>gear/gear-cmd-norm</input>
				<traverse>
					<setting>
						<position> 0 </position>
						<time>     0 </time>
					</setting>
					<setting>
						<position> 1 </position>
						<time>     5 </time>
					</setting>
				</traverse>
				<output>gear/gear-pos-norm</output>
			</kinematic>

		</channel>

		<channel name="Speedbrake">
			<kinematic name="Speedbrake Control">
				<input>fcs/speedbrake-cmd-norm</input>
				<traverse>
					<setting>
						<position> 0 </position>
						<time>     0 </time>
					</setting>
					<setting>
						<position> 0.5 </position>
						<time>     5 </time>
					</setting>
					<setting>
						<position> 1 </position>
						<time>     5 </time>
					</setting>
				</traverse>
				<output>fcs/speedbrake-pos-norm</output>
			</kinematic>

		</channel>

	</flight_control>

	<aerodynamics>

		<function name="aero/function/kCDge">
			<description>Change_in_drag_due_to_ground_effect</description>
			<product>
				<table>
					<independentVar>aero/h_b-mac-ft</independentVar>
					<tableData>
		                          0.0000	0.0480
       	        		          0.1000	0.5150
       	        		          0.1500	0.6290
       	        		          0.2000	0.7090
       	        		          0.3000	0.8150
       	        		          0.4000	0.8820
       	        		          0.5000	0.9280
       	        		          0.6000	0.9620
       	        		          0.7000	0.9880
       	        		          0.8000	1.0000
       	        		      </tableData>
       	        		  </table>
			</product>
		</function>

		<function name="aero/function/kCLge">
			<description>Change_in_lift_due_to_ground_effect</description>
			<product>
				<table>
					<independentVar>aero/h_b-mac-ft</independentVar>
					<tableData>
		                          0.0000	1.2030
		                          0.1000	1.1270
		                          0.1500	1.0900
		                          0.2000	1.0730
		                          0.3000	1.0460
		                          0.4000	1.0550
		                          0.5000	1.0190
		                          0.6000	1.0130
		                          0.7000	1.0080
		                          0.8000	1.0060
		                          0.9000	1.0030
		                          1.0000	1.0020
		                          1.1000	1.0000
		                      </tableData>
				</table>
			</product>
		</function>

		<axis name="LIFT">

			<function name="aero/coefficient/CLalpha">
				<description>Lift_due_to_alpha</description>
				<product>
					<property>aero/qbar-psf</property>
					<property>metrics/Sw-sqft</property>
					<property>aero/function/kCLge</property>
					<table>
						<independentVar lookup="row">aero/alpha-rad</independentVar>
						<tableData>
					              -0.20  -1.080
					               0.00   0.600
						       0.23   1.600
						       0.60   1.000
						</tableData>

					</table>
				</product>
			</function>

			<function name="aero/coefficient/dCLflap">
				<description>Delta_Lift_due_to_flaps</description>
				<product>
					<property>aero/qbar-psf</property>
					<property>metrics/Sw-sqft</property>
					<property>fcs/flap-pos-deg</property>
					<value> 0.06000 </value>
				</product>
			</function>

			<function name="aero/coefficient/dCLsb">
				<description>Delta_Lift_due_to_speedbrake</description>
				<product>
					<property>aero/qbar-psf</property>
					<property>metrics/Sw-sqft</property>
					<property>fcs/speedbrake-pos-norm</property>
					<value>-0.08</value>
				</product>
			</function>

			<function name="aero/coefficient/CLde">
				<description>Lift_due_to_Elevator_Deflection</description>
				<product>
					<property>aero/qbar-psf</property>
					<property>metrics/Sw-sqft</property>
					<property>fcs/elevator-pos-rad</property>
					<value>0.25</value>
				</product>
			</function>

		</axis>

		<axis name="DRAG">

			<function name="aero/force/Drag_basic">
				<description>Drag at zero lift</description>
				<product>
					<property>aero/qbar-psf</property>
					<property>metrics/Sw-sqft</property>
					<table>
						<independentVar lookup="row">aero/alpha-rad</independentVar>
						<tableData>
							-1.57    1.500
							-0.26    0.026
							 0.00    0.020
							 0.26    0.026
							 1.57    1.500
						</tableData>
					</table>
				</product>
			</function>

			<function name="aero/force/Drag_induced">
				<description>Induced drag</description>
				<product>
					<property>aero/qbar-psf</property>
					<property>metrics/Sw-sqft</property>
					<property>aero/cl-squared</property>
					<value>0.043</value>
				</product>
			</function>

			<function name="aero/force/Drag_mach">
				<description>Drag due to mach</description>
				<product>
					<property>aero/qbar-psf</property>
					<property>metrics/Sw-sqft</property>
					<table>
						<independentVar lookup="row">velocities/mach</independentVar>
						<tableData>
							 0.00      0.000
							 0.79      0.000
							 1.10      0.023
							 1.80      0.015
						</tableData>
					</table>
				</product>
			</function>

			<function name="aero/force/Drag_flap">
				<description>Drag due to flaps</description>
				<product>
					<property>aero/qbar-psf</property>
					<property>metrics/Sw-sqft</property>
					<property>fcs/flap-pos-deg</property>
					<value> 0.00145 </value>
				</product>
			</function>

			<function name="aero/force/Drag_gear">
				<description>Drag due to gear</description>
				<product>
					<property>aero/qbar-psf</property>
					<property>metrics/Sw-sqft</property>
					<property>gear/gear-pos-norm</property>
					<value>0.020</value>
				</product>
			</function>

			<function name="aero/force/Drag_speedbrake">
				<description>Drag due to speedbrakes</description>
				<product>
					<property>aero/qbar-psf</property>
					<property>metrics/Sw-sqft</property>
					<property>fcs/speedbrake-pos-norm</property>
					<value>0.035</value>
				</product>
			</function>

			<function name="aero/force/Drag_beta">
				<description>Drag due to sideslip</description>
				<product>
					<property>aero/qbar-psf</property>
					<property>metrics/Sw-sqft</property>
					<table>
						<independentVar lookup="row">aero/beta-rad</independentVar>
						<tableData>
							-1.57    1.000
							-0.26    0.030
							 0.00    0.000
							 0.26    0.030
							 1.57    1.000
						</tableData>
					</table>
				</product>
			</function>

			<function name="aero/force/Drag_elevator">
				<description>Drag due to Elevator Deflection</description>
				<product>
					<property>aero/qbar-psf</property>
					<property>metrics/Sw-sqft</property>
					<abs><property>fcs/elevator-pos-norm</property></abs>
					<value>0.035</value>
				</product>
			</function>
		</axis>

		<axis name="SIDE">

			<function name="aero/force/Side_beta">
				<description>Side force due to beta</description>
				<product>
					<property>aero/qbar-psf</property>
					<property>metrics/Sw-sqft</property>
					<property>aero/beta-rad</property>
					<value>-1</value>
				</product>
			</function>

		</axis>

		<axis name="ROLL">

			<function name="aero/moment/Roll_beta">
				<description>Roll moment due to beta</description>
				<product>
					<property>aero/qbar-psf</property>
					<property>metrics/Sw-sqft</property>
					<property>metrics/bw-ft</property>
					<property>aero/beta-rad</property>
					<value>-0.1</value>
				</product>
			</function>

			<function name="aero/moment/Roll_damp">
				<description>Roll moment due to roll rate</description>
				<product>
					<property>aero/qbar-psf</property>
					<property>metrics/Sw-sqft</property>
					<property>metrics/bw-ft</property>
					<property>aero/bi2vel</property>
					<property>velocities/p-aero-rad_sec</property>
					<value>-0.4</value>
				</product>
			</function>

			<function name="aero/moment/Roll_yaw">
				<description>Roll moment due to yaw rate</description>
				<product>
					<property>aero/qbar-psf</property>
					<property>metrics/Sw-sqft</property>
					<property>metrics/bw-ft</property>
					<property>aero/bi2vel</property>
					<property>velocities/r-aero-rad_sec</property>
					<value>0.15</value>
				</product>
			</function>

			<function name="aero/moment/Roll_aileron">
				<description>Roll moment due to aileron</description>
				<product>
					<property>aero/qbar-psf</property>
					<property>metrics/Sw-sqft</property>
					<property>metrics/bw-ft</property>
					<property>fcs/left-aileron-pos-rad</property>
					<value>0.1</value>
				</product>
			</function>

			<function name="aero/moment/Roll_rudder">
				<description>Roll moment due to rudder</description>
				<product>
					<property>aero/qbar-psf</property>
					<property>metrics/Sw-sqft</property>
					<property>metrics/bw-ft</property>
					<property>fcs/rudder-pos-rad</property>
					<value>0.01</value>
				</product>
			</function>

		</axis>

		<axis name="PITCH">

			<function name="aero/moment/Pitch_alpha">
				<description>Pitch moment due to alpha</description>
				<product>
					<property>aero/qbar-psf</property>
					<property>metrics/Sw-sqft</property>
					<property>metrics/cbarw-ft</property>
					<property>aero/alpha-rad</property>
					<value>-0.6</value>
				</product>
			</function>

			<function name="aero/moment/Pitch_elevator">
				<description>Pitch moment due to elevator</description>
				<product>
					<property>aero/qbar-psf</property>
					<property>metrics/Sw-sqft</property>
					<property>metrics/cbarw-ft</property>
					<property>fcs/elevator-pos-rad</property>
					<table>
						<independentVar lookup="row">velocities/mach</independentVar>
						<tableData>
							0.0     -1.200
							2.0     -0.300
						</tableData>
					</table>
				</product>
			</function>

			<function name="aero/moment/Pitch_damp">
				<description>Pitch moment due to pitch rate</description>
				<product>
					<property>aero/qbar-psf</property>
					<property>metrics/Sw-sqft</property>
					<property>metrics/cbarw-ft</property>
					<property>aero/ci2vel</property>
					<property>velocities/q-aero-rad_sec</property>
					<value>-17</value>
				</product>
			</function>

			<function name="aero/moment/Pitch_alphadot">
				<description>Pitch moment due to alpha rate</description>
				<product>
					<property>aero/qbar-psf</property>
					<property>metrics/Sw-sqft</property>
					<property>metrics/cbarw-ft</property>
					<property>aero/ci2vel</property>
					<property>aero/alphadot-rad_sec</property>
					<value>-6</value>
				</product>
			</function>

		</axis>

		<axis name="YAW">

			<function name="aero/moment/Yaw_beta">
				<description>Yaw moment due to beta</description>
				<product>
					<property>aero/qbar-psf</property>
					<property>metrics/Sw-sqft</property>
					<property>metrics/bw-ft</property>
					<property>aero/beta-rad</property>
					<value>0.12</value>
				</product>
			</function>

			<function name="aero/moment/Yaw_damp">
				<description>Yaw moment due to yaw rate</description>
				<product>
					<property>aero/qbar-psf</property>
					<property>metrics/Sw-sqft</property>
					<property>metrics/bw-ft</property>
					<property>aero/bi2vel</property>
					<property>velocities/r-aero-rad_sec</property>
					<value>-0.15</value>
				</product>
			</function>

			<function name="aero/moment/Yaw_rudder">
				<description>Yaw moment due to rudder</description>
				<product>
					<property>aero/qbar-psf</property>
					<property>metrics/Sw-sqft</property>
					<property>metrics/bw-ft</property>
					<property>fcs/rudder-pos-rad</property>
					<value>-0.1</value>
				</product>
			</function>

			<function name="aero/moment/Yaw_aileron">
				<description>Adverse yaw</description>
				<product>
					<property>aero/qbar-psf</property>
					<property>metrics/Sw-sqft</property>
					<property>metrics/bw-ft</property>
					<property>fcs/left-aileron-pos-rad</property>
					<value>0</value>
				</product>
			</function>

		</axis>

	</aerodynamics>

	<external_reactions>
		<force name="pushback" frame="BODY">
			<location unit="IN">
				<x> 504.48 </x>
				<y>   0.00 </y>
				<z> -213.84 </z>
			</location>
			<direction>
				<x>1</x>
				<y>0</y>
				<z>0</z>
			</direction>
		</force>
	</external_reactions>

</fdm_config>
